// SBML level 2 version 4

function R_synth_0(r_synth, R)
  r_synth*R;
end

model New_Model()

  // Compartments:
  compartment Intracellular = 1;

  // Species:
  species V in Intracellular = 20;
  species U in Intracellular = 0;
  species R in Intracellular = 0;
  species P in Intracellular = 0;
  species A in Intracellular = 0;

  // Parameters:
  r_uncoat = 0.01;
  r_prep = 0.01;
  lambda_R = 0;
  r_synth = 0.01;
  lambda_P = 0;
  r_assemble = 0.01;

  // Reactions:
  Uncoat: V => U; Intracellular*r_uncoat*V;
  Prep: U => R; Intracellular*r_prep*U;
  RNA_decay: R => ; Intracellular*lambda_R*R;
  R_synth: => P; Intracellular*R_synth_0(r_synth, R);  // modifiers: R
  P_decay: P => ; Intracellular*lambda_P*P;
  Assemble: P => A; Intracellular*r_assemble*P;

  // Unit definitions:
  unit volume = 1e-3 litre;
  unit substance = 1e-3 mole;
end
