// SBML level 2 version 4

function Constant_flux__irreversible(v)
  v;
end
Constant_flux__irreversible is "Constant flux (irreversible)";

model New_Model_1()

  // Compartments:
  compartment Cell = 1;

  // Species:
  species Oxy in Cell = 38;
  species $migration_speed in Cell;
  species transition_rate_0_1 in Cell = 10;

  // Parameters:
  Alpha = 2;

  // Assignment rules:
  migration_speed := Oxy*2;

  // Reactions:
  Aerobic_Reaction: Oxy => ; Cell*Alpha*Oxy;
  reaction: => transition_rate_0_1; Cell*Constant_flux__irreversible(v);
    v = 100;

  // Unit definitions:
  unit volume = 1e-3 litre;
  unit time = 60 second;
  unit substance = 1e-3 mole;
end
