// SBML level 2 version 4

model New_Model_1()

  // Compartments:
  compartment Intracellular = 1;
  compartment Extracellular = 1;

  // Species:
  species Glucose in Intracellular = 0;
  species Oxygen in Intracellular = 0;
  species Energy in Intracellular = 0;
  species Lactate in Intracellular = 0;
  species $Glucose_e in Extracellular = 20;
  species $Oxygen_e in Extracellular = 8;
  species Lactate_e in Extracellular = 0;

  // Parameters:
  k_aer = 0.5;
  k_ane = 0.1;
  k_usage = 0.4;
  k_glu_t = 0.2;
  k_oxy_t = 0.8;
  k_lac_t = 0.3;

  // Reactions:
  Aerobic: Glucose + Oxygen => 38 Energy; Intracellular*k_aer*Glucose*Oxygen;
  Anaerobic: Glucose => 4 Energy + Lactate; Intracellular*k_ane*Glucose;
  Energy_Usage: Energy => ; Intracellular*k_usage*Energy;
  Oxygen_Transfer: $Oxygen_e => Oxygen; Oxygen_Transfer_k1*Oxygen_e;
    Oxygen_Transfer_k1 = 0.1;
  Glucose_Transfer: $Glucose_e => Glucose; Glucose_Transfer_k1*Glucose_e;
    Glucose_Transfer_k1 = 0.1;
  Lactate_Transfer: Lactate => Lactate_e; Lactate_Transfer_k1*Lactate;
    Lactate_Transfer_k1 = 0.1;

  // Unit definitions:
  unit length = 1e-6 metre;
  unit area = (1e-6 metre)^2;
  unit volume = 1e-3 litre;
  unit time = 60 second;
  unit substance = 1e-3 mole;
end
