// SBML level 2 version 4

model New_Model()
  // New Model_1

  // Compartments:
  compartment Intracellular = 1;

  // Species:
  species Glucose in Intracellular = 20;
  species Oxygen in Intracellular = 15;
  species Energy in Intracellular = 0;
  species Lactate in Intracellular = 0;

  // Parameters:
  k_aer = 0.5;
  k_ane = 0.1;
  k_usage = 0.4;
  Cycle_Rate = 0;

  // Reactions:
  Aerobic: Glucose + Oxygen => 38 Energy; Intracellular*k_aer*Glucose*Oxygen;
  Anaerobic: Glucose => 4 Energy + Lactate; Intracellular*k_ane*Glucose;
  Energy_Usage: Energy => ; Intracellular*k_usage*Energy;

  // Events:
  event: at (Energy > 300): Cycle_Rate = 0.01;

  // Unit definitions:
  unit volume = 1e-3 litre;
  unit substance = 1e-3 mole;
  unit length = 1e-6 metre;
  unit area = (1e-6 metre)^2;
  unit time = 60 second;
end
